<neuroml xmlns="http://www.neuroml.org/schema/neuroml2"  xmlns:xs="http://www.w3.org/2001/XMLSchema" xmlns:xsi="http://www.w3.org/2001/XMLSchema-instance" xsi:schemaLocation="http://www.neuroml.org/schema/neuroml2 https://raw.github.com/NeuroML/NeuroML2/development/Schemas/NeuroML2/NeuroML_v2.3.1.xsd" id="cADpyr230_L4_PC_f15e35e578_0_0">
    <include href="pas.channel.nml"/>
    <include href="Ih.channel.nml"/>
    <include href="NaTs2_t.channel.nml"/>
    <include href="SKv3_1.channel.nml"/>
    <include href="Im.channel.nml"/>
    <include href="NaTa_t.channel.nml"/>
    <include href="K_Tst.channel.nml"/>
    <include href="Nap_Et2.channel.nml"/>
    <include href="SK_E2.channel.nml"/>
    <include href="Ca_HVA.channel.nml"/>
    <include href="K_Pst.channel.nml"/>
    <include href="CaDynamics_E2_NML2.nml"/>
    <include href="Ca_LVAst.channel.nml"/>
    <cell id="cADpyr230_L4_PC_f15e35e578_0_0">
        <notes>

Export of a cell model obtained from the BBP Neocortical Microcircuit Collaboration Portal into NeuroML2

******************************************************
*  This export to NeuroML2 has not yet been fully validated!!
*  Use with caution!!
******************************************************

For more information on this cell model see: https://bbp.epfl.ch/nmc-portal/microcircuit#/metype/L4_PC_L4PC/details

</notes>
        <morphology id="morphology">
            <segment id="0" name="Seg0_soma_0">
                <proximal x="-5.75813" y="-6.96089" z="2.23443" diameter="4.32564"/>
                <distal x="-5.15981" y="-6.21422" z="1.99889" diameter="7.71518"/>
            </segment>
            <segment id="2" name="Seg1_soma_0">
                <parent segment="0"/>
                <proximal x="-5.15981" y="-6.21422" z="1.99889" diameter="7.71518"/>
                <distal x="-4.56149" y="-5.46754" z="1.76335" diameter="11.2515"/>
            </segment>
            <segment id="3" name="Seg2_soma_0">
                <parent segment="2"/>
                <proximal x="-4.56149" y="-5.46754" z="1.76335" diameter="11.2515"/>
                <distal x="-3.96316" y="-4.72087" z="1.52781" diameter="12.1479"/>
            </segment>
            <segment id="4" name="Seg3_soma_0">
                <parent segment="3"/>
                <proximal x="-3.96316" y="-4.72087" z="1.52781" diameter="12.1479"/>
                <distal x="-3.36484" y="-3.97419" z="1.29227" diameter="12.8366"/>
            </segment>
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            <segmentGroup id="soma_0" neuroLexId="sao864921383">
                <notes>This group contains an unbranched set of segments, and all of the segmentGroups marked with
             neuroLexId = sao864921383 form a non-overlapping set of all of the segments.
             These segmentGroups correspond to the 'cables' of NeuroML v1.8.1, and map to/from NEURON sections.</notes>
                <member segment="0"/>
                <member segment="2"/>
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            </segmentGroup>
            <segmentGroup id="apic_0" neuroLexId="sao864921383">
                <notes>This group contains an unbranched set of segments, and all of the segmentGroups marked with
             neuroLexId = sao864921383 form a non-overlapping set of all of the segments.
             These segmentGroups correspond to the 'cables' of NeuroML v1.8.1, and map to/from NEURON sections.</notes>
                <member segment="1120"/>
                <member segment="1121"/>
                <member segment="1122"/>
            </segmentGroup>
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            <segmentGroup id="basal">
                <include segmentGroup="dend_0"/>
                <include segmentGroup="dend_1"/>
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                <inhomogeneousParameter id="PathLengthOver_basal" variable="p" metric="Path Length from root">
                    <proximal translationStart="0.0"/>
                </inhomogeneousParameter>
            </segmentGroup>
            <segmentGroup id="apical">
                <include segmentGroup="apic_0"/>
                <include segmentGroup="apic_1"/>
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                <inhomogeneousParameter id="PathLengthOver_apical" variable="p" metric="Path Length from root">
                    <proximal translationStart="0.0"/>
                </inhomogeneousParameter>
            </segmentGroup>
            <segmentGroup id="axonal">
                <include segmentGroup="axon_0"/>
                <include segmentGroup="axon_1"/>
            </segmentGroup>
            <segmentGroup id="somatic">
                <include segmentGroup="soma_0"/>
            </segmentGroup>
        </morphology>
        <biophysicalProperties id="biophys">
            <membraneProperties>
    <spikeThresh value="-20.0mV"/>
                <channelDensity id="all_g_pas" ionChannel="pas" condDensity="3e-5 S_per_cm2" erev="-75 mV" ion="non_specific"/>
                <channelDensity id="basal_gIhbar_Ih" ionChannel="Ih" condDensity="8e-05 S_per_cm2" erev="-45.0 mV" segmentGroup="basal" ion="hcn"/>
                <channelDensity id="apical_gNaTs2_tbar_NaTs2_t" ionChannel="NaTs2_t" condDensity="0.022874 S_per_cm2" erev="50.0 mV" segmentGroup="apical" ion="na"/>
                <channelDensity id="apical_gSKv3_1bar_SKv3_1" ionChannel="SKv3_1" condDensity="0.039967 S_per_cm2" erev="-85.0 mV" segmentGroup="apical" ion="k"/>
                <channelDensity id="apical_gImbar_Im" ionChannel="Im" condDensity="0.001 S_per_cm2" erev="-85.0 mV" segmentGroup="apical" ion="k"/>
                <channelDensity id="axonal_gNaTa_tbar_NaTa_t" ionChannel="NaTa_t" condDensity="3.999904 S_per_cm2" erev="50.0 mV" segmentGroup="axonal" ion="na"/>
                <channelDensity id="axonal_gK_Tstbar_K_Tst" ionChannel="K_Tst" condDensity="0.071166 S_per_cm2" erev="-85.0 mV" segmentGroup="axonal" ion="k"/>
                <channelDensity id="axonal_gNap_Et2bar_Nap_Et2" ionChannel="Nap_Et2" condDensity="5.6e-05 S_per_cm2" erev="50.0 mV" segmentGroup="axonal" ion="na"/>
                <channelDensity id="axonal_gSK_E2bar_SK_E2" ionChannel="SK_E2" condDensity="0.097244 S_per_cm2" erev="-85.0 mV" segmentGroup="axonal" ion="k"/>
                <channelDensity id="axonal_gK_Pstbar_K_Pst" ionChannel="K_Pst" condDensity="0.428834 S_per_cm2" erev="-85.0 mV" segmentGroup="axonal" ion="k"/>
                <channelDensity id="axonal_gSKv3_1bar_SKv3_1" ionChannel="SKv3_1" condDensity="0.004779 S_per_cm2" erev="-85.0 mV" segmentGroup="axonal" ion="k"/>
                <channelDensity id="somatic_gSKv3_1bar_SKv3_1" ionChannel="SKv3_1" condDensity="0.283745 S_per_cm2" erev="-85.0 mV" segmentGroup="somatic" ion="k"/>
                <channelDensity id="somatic_gSK_E2bar_SK_E2" ionChannel="SK_E2" condDensity="0.002971 S_per_cm2" erev="-85.0 mV" segmentGroup="somatic" ion="k"/>
                <channelDensity id="somatic_gNaTs2_tbar_NaTs2_t" ionChannel="NaTs2_t" condDensity="0.999812 S_per_cm2" erev="50.0 mV" segmentGroup="somatic" ion="na"/>
                <channelDensity id="somatic_gIhbar_Ih" ionChannel="Ih" condDensity="8e-05 S_per_cm2" erev="-45.0 mV" segmentGroup="somatic" ion="hcn"/>
                <channelDensityNernst id="axonal_gCa_HVAbar_Ca_HVA" ionChannel="Ca_HVA" condDensity="0.00086 S_per_cm2" segmentGroup="axonal" ion="ca"/>
                <channelDensityNernst id="axonal_gCa_LVAstbar_Ca_LVAst" ionChannel="Ca_LVAst" condDensity="0.001612 S_per_cm2" segmentGroup="axonal" ion="ca"/>
                <channelDensityNernst id="somatic_gCa_HVAbar_Ca_HVA" ionChannel="Ca_HVA" condDensity="0.000379 S_per_cm2" segmentGroup="somatic" ion="ca"/>
                <channelDensityNernst id="somatic_gCa_LVAstbar_Ca_LVAst" ionChannel="Ca_LVAst" condDensity="0.006868 S_per_cm2" segmentGroup="somatic" ion="ca"/>
                <channelDensityNonUniform id="apical_gIhbar_Ih" ionChannel="Ih" erev="-45.0 mV" ion="hcn">
                    <variableParameter parameter="condDensity" segmentGroup="apical">
                        <inhomogeneousValue inhomogeneousParameter="PathLengthOver_apical" value="1e4 * ((-0.869600 + 2.087000*exp((p-0.000000)*0.003100))*0.000080)"/>
                    </variableParameter>
                </channelDensityNonUniform>
                <specificCapacitance value="2 uF_per_cm2" segmentGroup="basal"/>
                <specificCapacitance value="2 uF_per_cm2" segmentGroup="apical"/>
                <specificCapacitance value="1.0 uF_per_cm2" segmentGroup="axonal"/>
                <specificCapacitance value="1.0 uF_per_cm2" segmentGroup="somatic"/>
                <initMembPotential value="-80 mV"/>
            </membraneProperties>
            <intracellularProperties>
                <species id="ca" concentrationModel="CaDynamics_E2_NML2__cADpyr_230_axonal" ion="ca" initialConcentration="5.0E-11 mol_per_cm3" initialExtConcentration="2.0E-6 mol_per_cm3" segmentGroup="axonal"/>
                <species id="ca" concentrationModel="CaDynamics_E2_NML2__cADpyr_230_somatic" ion="ca" initialConcentration="5.0E-11 mol_per_cm3" initialExtConcentration="2.0E-6 mol_per_cm3" segmentGroup="somatic"/>
                <resistivity value="100 ohm_cm"/>
            </intracellularProperties>
        </biophysicalProperties>
    </cell>
</neuroml>
